X := 1
i := 0 .. 50000
Y := 0
N[i] := i
M[i] := N[i] + X - Y
z := 10 .. 16000
F[z] := log(M[z]) + M[z] + 2*N[z]*M[z] + sum(log(j), j = 1 .. X) + sum(log(M[z] - X + k), k = 1 .. Y)
FF[z] := M[z] + M[z] + M[z]*N[z] + sum(log(k), k = 1 .. N[z])
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FFF[z] := N[z] + M[z] + sum(log(k), k = 1 .. N[z])
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